*Heading
** Job name: cook_2d Model name: cook_2d
*Preprint, echo=NO, model=NO, history=NO, contact=NO
**
** PARTS
**
*Part, name=cpe3h_04
*Node
      1,           0.,           0.
      2,          12.,          11.
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*Element, type=CPE3H
 1,  1,  2,  6
 2,  2,  7,  6
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*Node
     26,          48.,          52.,           0.
*Nset, nset=cpe3h_04-RefPt_, internal
26,
*Nset, nset=_PickedSet2, internal, generate
  1,  25,   1
*Elset, elset=_PickedSet2, internal, generate
  1,  32,   1
*Nset, nset=Fix, generate
  1,  21,   5
*Elset, elset=Fix, generate
  1,  25,   8
*Nset, nset=Set-1
  1,  2,  3,  4,  5,  6, 10, 11, 15, 16, 20, 21, 22, 23, 24, 25
*Elset, elset=Set-1
  1,  3,  5,  7,  8,  9, 16, 17, 24, 25, 26, 28, 30, 32
*Nset, nset=Corner
 25,
*Nset, nset=RP
 26,
*Elset, elset=_Constraint_S1, internal, generate
  8,  32,   8
*Surface, type=ELEMENT, name=Constraint
_Constraint_S1, S1
** Section: Section-1
*Solid Section, elset=_PickedSet2, material=Material-1
1.,
*End Part
**
*Part, name=cpe3h_08
*Node
      1,           0.,           0.
      2,           6.,          5.5
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*Element, type=CPE3H
  1,  1,  2, 10
  2,  2, 11, 10
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*Node
     82,          48.,          52.,           0.
*Nset, nset=cpe3h_08-RefPt_, internal
82,
*Nset, nset=_PickedSet2, internal, generate
  1,  81,   1
*Elset, elset=_PickedSet2, internal, generate
   1,  128,    1
*Nset, nset=Fix, generate
  1,  73,   9
*Elset, elset=Fix, generate
   1,  113,   16
*Nset, nset=Set-1
  1,  2,  3,  4,  5,  6
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*Elset, elset=Set-1
   1,   3,   5,   7,   9,  11
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*Nset, nset=Corner
 81,
*Nset, nset=RP
 82,
*Elset, elset=_Constraint_S1, internal, generate
  16,  128,   16
*Surface, type=ELEMENT, name=Constraint
_Constraint_S1, S1
** Section: Section-1
*Solid Section, elset=_PickedSet2, material=Material-1
1.,
*End Part
**
*Part, name=cpe3h_16
*Node
      1,           0.,           0.
      2,           3.,         2.75
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*Element, type=CPE3H
  1,   1,   2,  18
  2,   2,  19,  18
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*Node
    290,          48.,          52.,           0.
*Nset, nset=cpe3h_16-RefPt_, internal
290,
*Nset, nset=_PickedSet2, internal, generate
   1,  289,    1
*Elset, elset=_PickedSet2, internal, generate
   1,  512,    1
*Nset, nset=Fix, generate
   1,  273,   17
*Elset, elset=Fix, generate
   1,  481,   32
*Nset, nset=Set-1
   1,   2,   3,   4,   5,   6
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*Elset, elset=Set-1
   1,   3,   5,   7,   9,  11
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*Nset, nset=Corner
 289,
*Nset, nset=RP
 290,
*Elset, elset=_Constraint_S1, internal, generate
  32,  512,   32
*Surface, type=ELEMENT, name=Constraint
_Constraint_S1, S1
** Section: Section-1
*Solid Section, elset=_PickedSet2, material=Material-1
1.,
*End Part
**
*Part, name=cpe3h_32
*Node
      1,           0.,           0.
      2,          1.5,        1.375
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*Element, type=CPE3H
   1,    1,    2,   34
   2,    2,   35,   34
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*Node
   1090,          48.,          52.,           0.
*Nset, nset=cpe3h_32-RefPt_, internal
1090,
*Nset, nset=_PickedSet2, internal, generate
    1,  1089,     1
*Elset, elset=_PickedSet2, internal, generate
    1,  2048,     1
*Nset, nset=Fix, generate
    1,  1057,    33
*Elset, elset=Fix, generate
    1,  1985,    64
*Nset, nset=Set-1
    1,    2,    3,    4,    5,    6
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*Elset, elset=Set-1
    1,    3,    5,    7,    9,   11
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*Nset, nset=Corner
 1089,
*Nset, nset=RP
 1090,
*Elset, elset=_Constraint_S1, internal, generate
   64,  2048,    64
*Surface, type=ELEMENT, name=Constraint
_Constraint_S1, S1
** Section: Section-1
*Solid Section, elset=_PickedSet2, material=Material-1
1.,
*End Part
**
*Part, name=cpe4h_04
*Node
      1,           0.,           0.
      2,          12.,          11.
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*Element, type=CPE4H
 1,  1,  2,  7,  6
 2,  2,  3,  8,  7
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*Node
     26,          48.,          52.,           0.
*Nset, nset=cpe4h_04-RefPt_, internal
26,
*Nset, nset=_PickedSet2, internal, generate
  1,  25,   1
*Elset, elset=_PickedSet2, internal, generate
  1,  16,   1
*Nset, nset=Fix, generate
  1,  21,   5
*Elset, elset=Fix, generate
  1,  13,   4
*Nset, nset=Set-1
  1,  2,  3,  4,  5,  6, 10, 11, 15, 16, 20, 21, 22, 23, 24, 25
*Elset, elset=Set-1
  1,  2,  3,  4,  5,  8,  9, 12, 13, 14, 15, 16
*Nset, nset=Corner
 25,
*Nset, nset=RP
 26,
*Elset, elset=_Constraint_S2, internal, generate
  4,  16,   4
*Surface, type=ELEMENT, name=Constraint
_Constraint_S2, S2
** Section: Section-1
*Solid Section, elset=_PickedSet2, material=Material-1
1.,
*End Part
**
*Part, name=cpe4h_08
*Node
      1,           0.,           0.
      2,           6.,          5.5
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*Element, type=CPE4H
 1,  1,  2, 11, 10
 2,  2,  3, 12, 11
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*Node
     82,          48.,          52.,           0.
*Nset, nset=cpe4h_08-RefPt_, internal
82,
*Nset, nset=_PickedSet2, internal, generate
  1,  81,   1
*Elset, elset=_PickedSet2, internal, generate
  1,  64,   1
*Nset, nset=Fix, generate
  1,  73,   9
*Elset, elset=Fix, generate
  1,  57,   8
*Nset, nset=Set-1
  1,  2,  3,  4,  5,  6
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*Elset, elset=Set-1
  1,  2,  3,  4,  5,  6
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*Nset, nset=Corner
 81,
*Nset, nset=RP
 82,
*Elset, elset=_Constraint_S2, internal, generate
  8,  64,   8
*Surface, type=ELEMENT, name=Constraint
_Constraint_S2, S2
** Section: Section-1
*Solid Section, elset=_PickedSet2, material=Material-1
1.,
*End Part
**
*Part, name=cpe4h_16
*Node
      1,           0.,           0.
      2,           3.,         2.75
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*Element, type=CPE4H
  1,   1,   2,  19,  18
  2,   2,   3,  20,  19
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*Node
    290,          48.,          52.,           0.
*Nset, nset=cpe4h_16-RefPt_, internal
290,
*Nset, nset=_PickedSet2, internal, generate
   1,  289,    1
*Elset, elset=_PickedSet2, internal, generate
   1,  256,    1
*Nset, nset=Fix, generate
   1,  273,   17
*Elset, elset=Fix, generate
   1,  241,   16
*Nset, nset=Set-1
   1,   2,   3,   4,   5,   6
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*Elset, elset=Set-1
   1,   2,   3,   4,   5,   6
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*Nset, nset=Corner
 289,
*Nset, nset=RP
 290,
*Elset, elset=_Constraint_S2, internal, generate
  16,  256,   16
*Surface, type=ELEMENT, name=Constraint
_Constraint_S2, S2
** Section: Section-1
*Solid Section, elset=_PickedSet2, material=Material-1
1.,
*End Part
**
*Part, name=cpe4h_32
*Node
      1,           0.,           0.
      2,          1.5,        1.375
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*Element, type=CPE4H
   1,    1,    2,   35,   34
   2,    2,    3,   36,   35
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*Node
   1090,          48.,          52.,           0.
*Nset, nset=cpe4h_32-RefPt_, internal
1090,
*Nset, nset=_PickedSet2, internal, generate
    1,  1089,     1
*Elset, elset=_PickedSet2, internal, generate
    1,  1024,     1
*Nset, nset=Fix, generate
    1,  1057,    33
*Elset, elset=Fix, generate
   1,  993,   32
*Nset, nset=Set-1
    1,    2,    3,    4,    5,    6
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*Elset, elset=Set-1
    1,    2,    3,    4,    5,    6
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*Nset, nset=Corner
 1089,
*Nset, nset=RP
 1090,
*Elset, elset=_Constraint_S2, internal, generate
   32,  1024,    32
*Surface, type=ELEMENT, name=Constraint
_Constraint_S2, S2
** Section: Section-1
*Solid Section, elset=_PickedSet2, material=Material-1
1.,
*End Part
**
*Part, name=cpe4ih_04
*Node
      1,           0.,           0.
      2,          12.,          11.
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*Element, type=CPE4IH
 1,  1,  2,  7,  6
 2,  2,  3,  8,  7
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*Node
     26,          48.,          52.,           0.
*Nset, nset=cpe4ih_04-RefPt_, internal
26,
*Nset, nset=_PickedSet2, internal, generate
  1,  25,   1
*Elset, elset=_PickedSet2, internal, generate
  1,  16,   1
*Nset, nset=Fix, generate
  1,  21,   5
*Elset, elset=Fix, generate
  1,  13,   4
*Nset, nset=Set-1
  1,  2,  3,  4,  5,  6, 10, 11, 15, 16, 20, 21, 22, 23, 24, 25
*Elset, elset=Set-1
  1,  2,  3,  4,  5,  8,  9, 12, 13, 14, 15, 16
*Nset, nset=Corner
 25,
*Nset, nset=RP
 26,
*Elset, elset=_Constraint_S2, internal, generate
  4,  16,   4
*Surface, type=ELEMENT, name=Constraint
_Constraint_S2, S2
** Section: Section-1
*Solid Section, elset=_PickedSet2, material=Material-1
1.,
*End Part
**
*Part, name=cpe4ih_08
*Node
      1,           0.,           0.
      2,           6.,          5.5
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*Element, type=CPE4IH
 1,  1,  2, 11, 10
 2,  2,  3, 12, 11
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*Node
     82,          48.,          52.,           0.
*Nset, nset=cpe4ih_08-RefPt_, internal
82,
*Nset, nset=_PickedSet2, internal, generate
  1,  81,   1
*Elset, elset=_PickedSet2, internal, generate
  1,  64,   1
*Nset, nset=Fix, generate
  1,  73,   9
*Elset, elset=Fix, generate
  1,  57,   8
*Nset, nset=Set-1
  1,  2,  3,  4,  5,  6
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*Elset, elset=Set-1
  1,  2,  3,  4,  5,  6
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*Nset, nset=Corner
 81,
*Nset, nset=RP
 82,
*Elset, elset=_Constraint_S2, internal, generate
  8,  64,   8
*Surface, type=ELEMENT, name=Constraint
_Constraint_S2, S2
** Section: Section-1
*Solid Section, elset=_PickedSet2, material=Material-1
1.,
*End Part
**
*Part, name=cpe4ih_16
*Node
      1,           0.,           0.
      2,           3.,         2.75
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*Element, type=CPE4IH
  1,   1,   2,  19,  18
  2,   2,   3,  20,  19
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*Node
    290,          48.,          52.,           0.
*Nset, nset=cpe4ih_16-RefPt_, internal
290,
*Nset, nset=_PickedSet2, internal, generate
   1,  289,    1
*Elset, elset=_PickedSet2, internal, generate
   1,  256,    1
*Nset, nset=Fix, generate
   1,  273,   17
*Elset, elset=Fix, generate
   1,  241,   16
*Nset, nset=Set-1
   1,   2,   3,   4,   5,   6
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*Elset, elset=Set-1
   1,   2,   3,   4,   5,   6
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*Nset, nset=Corner
 289,
*Nset, nset=RP
 290,
*Elset, elset=_Constraint_S2, internal, generate
  16,  256,   16
*Surface, type=ELEMENT, name=Constraint
_Constraint_S2, S2
** Section: Section-1
*Solid Section, elset=_PickedSet2, material=Material-1
1.,
*End Part
**
*Part, name=cpe4ih_32
*Node
      1,           0.,           0.
      2,          1.5,        1.375
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*Element, type=CPE4IH
   1,    1,    2,   35,   34
   2,    2,    3,   36,   35
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*Node
   1090,          48.,          52.,           0.
*Nset, nset=cpe4ih_32-RefPt_, internal
1090,
*Nset, nset=_PickedSet2, internal, generate
    1,  1089,     1
*Elset, elset=_PickedSet2, internal, generate
    1,  1024,     1
*Nset, nset=Fix, generate
    1,  1057,    33
*Elset, elset=Fix, generate
   1,  993,   32
*Nset, nset=Set-1
    1,    2,    3,    4,    5,    6
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*Elset, elset=Set-1
    1,    2,    3,    4,    5,    6
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*Nset, nset=Corner
 1089,
*Nset, nset=RP
 1090,
*Elset, elset=_Constraint_S2, internal, generate
   32,  1024,    32
*Surface, type=ELEMENT, name=Constraint
_Constraint_S2, S2
** Section: Section-1
*Solid Section, elset=_PickedSet2, material=Material-1
1.,
*End Part
**
*Part, name=cpe4rh_04
*Node
      1,           0.,           0.
      2,          12.,          11.
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*Element, type=CPE4RH
 1,  1,  2,  7,  6
 2,  2,  3,  8,  7
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*Node
     26,          48.,          52.,           0.
*Nset, nset=cpe4rh_04-RefPt_, internal
26,
*Nset, nset=_PickedSet2, internal, generate
  1,  25,   1
*Elset, elset=_PickedSet2, internal, generate
  1,  16,   1
*Nset, nset=Fix, generate
  1,  21,   5
*Elset, elset=Fix, generate
  1,  13,   4
*Nset, nset=Set-1
  1,  2,  3,  4,  5,  6, 10, 11, 15, 16, 20, 21, 22, 23, 24, 25
*Elset, elset=Set-1
  1,  2,  3,  4,  5,  8,  9, 12, 13, 14, 15, 16
*Nset, nset=Corner
 25,
*Nset, nset=RP
 26,
*Elset, elset=_Constraint_S2, internal, generate
  4,  16,   4
*Surface, type=ELEMENT, name=Constraint
_Constraint_S2, S2
** Section: Section-1
*Solid Section, elset=_PickedSet2, material=Material-1
1.,
*End Part
**
*Part, name=cpe4rh_08
*Node
      1,           0.,           0.
      2,           6.,          5.5
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*Element, type=CPE4RH
 1,  1,  2, 11, 10
 2,  2,  3, 12, 11
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*Node
     82,          48.,          52.,           0.
*Nset, nset=cpe4rh_08-RefPt_, internal
82,
*Nset, nset=_PickedSet2, internal, generate
  1,  81,   1
*Elset, elset=_PickedSet2, internal, generate
  1,  64,   1
*Nset, nset=Fix, generate
  1,  73,   9
*Elset, elset=Fix, generate
  1,  57,   8
*Nset, nset=Set-1
  1,  2,  3,  4,  5,  6
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*Elset, elset=Set-1
  1,  2,  3,  4,  5,  6
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*Nset, nset=Corner
 81,
*Nset, nset=RP
 82,
*Elset, elset=_Constraint_S2, internal, generate
  8,  64,   8
*Surface, type=ELEMENT, name=Constraint
_Constraint_S2, S2
** Section: Section-1
*Solid Section, elset=_PickedSet2, material=Material-1
1.,
*End Part
**
*Part, name=cpe4rh_16
*Node
      1,           0.,           0.
      2,           3.,         2.75
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*Element, type=CPE4RH
  1,   1,   2,  19,  18
  2,   2,   3,  20,  19
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*Node
    290,          48.,          52.,           0.
*Nset, nset=cpe4rh_16-RefPt_, internal
290,
*Nset, nset=_PickedSet2, internal, generate
   1,  289,    1
*Elset, elset=_PickedSet2, internal, generate
   1,  256,    1
*Nset, nset=Fix, generate
   1,  273,   17
*Elset, elset=Fix, generate
   1,  241,   16
*Nset, nset=Set-1
   1,   2,   3,   4,   5,   6
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*Elset, elset=Set-1
   1,   2,   3,   4,   5,   6
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*Nset, nset=Corner
 289,
*Nset, nset=RP
 290,
*Elset, elset=_Constraint_S2, internal, generate
  16,  256,   16
*Surface, type=ELEMENT, name=Constraint
_Constraint_S2, S2
** Section: Section-1
*Solid Section, elset=_PickedSet2, material=Material-1
1.,
*End Part
**
*Part, name=cpe4rh_32
*Node
      1,           0.,           0.
      2,          1.5,        1.375
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*Element, type=CPE4RH
   1,    1,    2,   35,   34
   2,    2,    3,   36,   35
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*Node
   1090,          48.,          52.,           0.
*Nset, nset=cpe4rh_32-RefPt_, internal
1090,
*Nset, nset=_PickedSet2, internal, generate
    1,  1089,     1
*Elset, elset=_PickedSet2, internal, generate
    1,  1024,     1
*Nset, nset=Fix, generate
    1,  1057,    33
*Elset, elset=Fix, generate
   1,  993,   32
*Nset, nset=Set-1
    1,    2,    3,    4,    5,    6
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*Elset, elset=Set-1
    1,    2,    3,    4,    5,    6
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*Nset, nset=Corner
 1089,
*Nset, nset=RP
 1090,
*Elset, elset=_Constraint_S2, internal, generate
   32,  1024,    32
*Surface, type=ELEMENT, name=Constraint
_Constraint_S2, S2
** Section: Section-1
*Solid Section, elset=_PickedSet2, material=Material-1
1.,
*End Part
**
*Part, name=cpe6h_04
*Node
      1,           0.,           0.
      2,          12.,          11.
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*Element, type=CPE6H
 1,  1,  2,  6, 26, 27, 28
 2,  2,  7,  6, 29, 30, 27
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*Node
     82,          48.,          52.,           0.
*Nset, nset=cpe6h_04-RefPt_, internal
82,
*Nset, nset=_PickedSet2, internal, generate
  1,  81,   1
*Elset, elset=_PickedSet2, internal, generate
  1,  32,   1
*Nset, nset=Fix
  1,  6, 11, 16, 21, 28, 44, 57, 70
*Elset, elset=Fix, generate
  1,  25,   8
*Nset, nset=Set-1
  1,  2,  3,  4,  5,  6
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*Elset, elset=Set-1
  1,  3,  5,  7,  8,  9, 16, 17, 24, 25, 26, 28, 30, 32
*Nset, nset=Corner
 25,
*Nset, nset=RP
 82,
*Elset, elset=_Constraint_S1, internal, generate
  8,  32,   8
*Surface, type=ELEMENT, name=Constraint
_Constraint_S1, S1
** Section: Section-1
*Solid Section, elset=_PickedSet2, material=Material-1
1.,
*End Part
**
*Part, name=cpe6h_08
*Node
      1,           0.,           0.
      2,           6.,          5.5
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*Element, type=CPE6H
  1,   1,   2,  10,  82,  83,  84
  2,   2,  11,  10,  85,  86,  83
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*Node
    290,          48.,          52.,           0.
*Nset, nset=cpe6h_08-RefPt_, internal
290,
*Nset, nset=_PickedSet2, internal, generate
   1,  289,    1
*Elset, elset=_PickedSet2, internal, generate
   1,  128,    1
*Nset, nset=Fix
   1,  10,  19,  28,  37,  46
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*Elset, elset=Fix, generate
   1,  113,   16
*Nset, nset=Set-1
   1,   2,   3,   4,   5,   6
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*Elset, elset=Set-1
   1,   3,   5,   7,   9,  11
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*Nset, nset=Corner
 81,
*Nset, nset=RP
 290,
*Elset, elset=_Constraint_S1, internal, generate
  16,  128,   16
*Surface, type=ELEMENT, name=Constraint
_Constraint_S1, S1
** Section: Section-1
*Solid Section, elset=_PickedSet2, material=Material-1
1.,
*End Part
**
*Part, name=cpe6h_16
*Node
      1,           0.,           0.
      2,           3.,         2.75
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*Element, type=CPE6H
  1,    1,    2,   18,  290,  291,  292
  2,    2,   19,   18,  293,  294,  291
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*Node
   1090,          48.,          52.,           0.
*Nset, nset=cpe6h_16-RefPt_, internal
1090,
*Nset, nset=_PickedSet2, internal, generate
    1,  1089,     1
*Elset, elset=_PickedSet2, internal, generate
   1,  512,    1
*Nset, nset=Fix
    1,   18,   35,   52,   69,   86
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*Elset, elset=Fix, generate
   1,  481,   32
*Nset, nset=Set-1
    1,    2,    3,    4,    5,    6
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*Elset, elset=Set-1
   1,   3,   5,   7,   9,  11
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*Nset, nset=Corner
 289,
*Nset, nset=RP
 1090,
*Elset, elset=_Constraint_S1, internal, generate
  32,  512,   32
*Surface, type=ELEMENT, name=Constraint
_Constraint_S1, S1
** Section: Section-1
*Solid Section, elset=_PickedSet2, material=Material-1
1.,
*End Part
**
*Part, name=cpe6h_32
*Node
      1,           0.,           0.
      2,          1.5,        1.375
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*Element, type=CPE6H
   1,    1,    2,   34, 1090, 1091, 1092
   2,    2,   35,   34, 1093, 1094, 1091
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*Node
   4226,          48.,          52.,           0.
*Nset, nset=cpe6h_32-RefPt_, internal
4226,
*Nset, nset=_PickedSet2, internal, generate
    1,  4225,     1
*Elset, elset=_PickedSet2, internal, generate
    1,  2048,     1
*Nset, nset=Fix
    1,   34,   67,  100,  133,  166
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*Elset, elset=Fix, generate
    1,  1985,    64
*Nset, nset=Set-1
    1,    2,    3,    4,    5,    6
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*Elset, elset=Set-1
    1,    3,    5,    7,    9,   11
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*Nset, nset=Corner
 1089,
*Nset, nset=RP
 4226,
*Elset, elset=_Constraint_S1, internal, generate
   64,  2048,    64
*Surface, type=ELEMENT, name=Constraint
_Constraint_S1, S1
** Section: Section-1
*Solid Section, elset=_PickedSet2, material=Material-1
1.,
*End Part
**
*Part, name=cpe6mh_04
*Node
      1,           0.,           0.
      2,          12.,          11.
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*Element, type=CPE6MH
 1,  1,  2,  6, 26, 27, 28
 2,  2,  7,  6, 29, 30, 27
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*Node
     82,          48.,          52.,           0.
*Nset, nset=cpe6mh_04-RefPt_, internal
82,
*Nset, nset=_PickedSet2, internal, generate
  1,  81,   1
*Elset, elset=_PickedSet2, internal, generate
  1,  32,   1
*Nset, nset=Fix
  1,  6, 11, 16, 21, 28, 44, 57, 70
*Elset, elset=Fix, generate
  1,  25,   8
*Nset, nset=Set-1
  1,  2,  3,  4,  5,  6
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*Elset, elset=Set-1
  1,  3,  5,  7,  8,  9, 16, 17, 24, 25, 26, 28, 30, 32
*Nset, nset=Corner
 25,
*Nset, nset=RP
 82,
*Elset, elset=_Constraint_S1, internal, generate
  8,  32,   8
*Surface, type=ELEMENT, name=Constraint
_Constraint_S1, S1
** Section: Section-1
*Solid Section, elset=_PickedSet2, material=Material-1
1.,
*End Part
**
*Part, name=cpe6mh_08
*Node
      1,           0.,           0.
      2,           6.,          5.5
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*Element, type=CPE6MH
  1,   1,   2,  10,  82,  83,  84
  2,   2,  11,  10,  85,  86,  83
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*Node
    290,          48.,          52.,           0.
*Nset, nset=cpe6mh_08-RefPt_, internal
290,
*Nset, nset=_PickedSet2, internal, generate
   1,  289,    1
*Elset, elset=_PickedSet2, internal, generate
   1,  128,    1
*Nset, nset=Fix
   1,  10,  19,  28,  37,  46
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*Elset, elset=Fix, generate
   1,  113,   16
*Nset, nset=Set-1
   1,   2,   3,   4,   5,   6
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*Elset, elset=Set-1
   1,   3,   5,   7,   9,  11
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*Nset, nset=Corner
 81,
*Nset, nset=RP
 290,
*Elset, elset=_Constraint_S1, internal, generate
  16,  128,   16
*Surface, type=ELEMENT, name=Constraint
_Constraint_S1, S1
** Section: Section-1
*Solid Section, elset=_PickedSet2, material=Material-1
1.,
*End Part
**
*Part, name=cpe6mh_16
*Node
      1,           0.,           0.
      2,           3.,         2.75
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*Element, type=CPE6MH
  1,    1,    2,   18,  290,  291,  292
  2,    2,   19,   18,  293,  294,  291
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*Node
   1090,          48.,          52.,           0.
*Nset, nset=cpe6mh_16-RefPt_, internal
1090,
*Nset, nset=_PickedSet2, internal, generate
    1,  1089,     1
*Elset, elset=_PickedSet2, internal, generate
   1,  512,    1
*Nset, nset=Fix
    1,   18,   35,   52,   69,   86
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*Elset, elset=Fix, generate
   1,  481,   32
*Nset, nset=Set-1
    1,    2,    3,    4,    5,    6
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*Elset, elset=Set-1
   1,   3,   5,   7,   9,  11
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*Nset, nset=Corner
 289,
*Nset, nset=RP
 1090,
*Elset, elset=_Constraint_S1, internal, generate
  32,  512,   32
*Surface, type=ELEMENT, name=Constraint
_Constraint_S1, S1
** Section: Section-1
*Solid Section, elset=_PickedSet2, material=Material-1
1.,
*End Part
**
*Part, name=cpe6mh_32
*Node
      1,           0.,           0.
      2,          1.5,        1.375
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*Element, type=CPE6MH
   1,    1,    2,   34, 1090, 1091, 1092
   2,    2,   35,   34, 1093, 1094, 1091
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*Node
   4226,          48.,          52.,           0.
*Nset, nset=cpe6mh_32-RefPt_, internal
4226,
*Nset, nset=_PickedSet2, internal, generate
    1,  4225,     1
*Elset, elset=_PickedSet2, internal, generate
    1,  2048,     1
*Nset, nset=Fix
    1,   34,   67,  100,  133,  166
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*Elset, elset=Fix, generate
    1,  1985,    64
*Nset, nset=Set-1
    1,    2,    3,    4,    5,    6
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*Elset, elset=Set-1
    1,    3,    5,    7,    9,   11
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*Nset, nset=Corner
 1089,
*Nset, nset=RP
 4226,
*Elset, elset=_Constraint_S1, internal, generate
   64,  2048,    64
*Surface, type=ELEMENT, name=Constraint
_Constraint_S1, S1
** Section: Section-1
*Solid Section, elset=_PickedSet2, material=Material-1
1.,
*End Part
**
**
** ASSEMBLY
**
*Assembly, name=Assembly
**
*Instance, name=cpe3h_04-1, part=cpe3h_04
*End Instance
**
*Instance, name=cpe3h_08-1, part=cpe3h_08
        52.8,           0.,           0.
*End Instance
**
*Instance, name=cpe3h_16-1, part=cpe3h_16
       105.6,           0.,           0.
*End Instance
**
*Instance, name=cpe3h_32-1, part=cpe3h_32
       158.4,           0.,           0.
*End Instance
**
*Instance, name=cpe6mh_04-1, part=cpe6mh_04
       211.2,           0.,           0.
*End Instance
**
*Instance, name=cpe6mh_08-1, part=cpe6mh_08
        264.,           0.,           0.
*End Instance
**
*Instance, name=cpe6mh_16-1, part=cpe6mh_16
       316.8,           0.,           0.
*End Instance
**
*Instance, name=cpe6mh_32-1, part=cpe6mh_32
       369.6,           0.,           0.
*End Instance
**
*Instance, name=cpe6h_04-1, part=cpe6h_04
       422.4,           0.,           0.
*End Instance
**
*Instance, name=cpe6h_08-1, part=cpe6h_08
       475.2,           0.,           0.
*End Instance
**
*Instance, name=cpe6h_16-1, part=cpe6h_16
        528.,           0.,           0.
*End Instance
**
*Instance, name=cpe6h_32-1, part=cpe6h_32
       580.8,           0.,           0.
*End Instance
**
*Instance, name=cpe4h_04-1, part=cpe4h_04
       633.6,           0.,           0.
*End Instance
**
*Instance, name=cpe4h_08-1, part=cpe4h_08
       686.4,           0.,           0.
*End Instance
**
*Instance, name=cpe4h_16-1, part=cpe4h_16
       739.2,           0.,           0.
*End Instance
**
*Instance, name=cpe4h_32-1, part=cpe4h_32
        792.,           0.,           0.
*End Instance
**
*Instance, name=cpe4ih_04-1, part=cpe4ih_04
       844.8,           0.,           0.
*End Instance
**
*Instance, name=cpe4ih_08-1, part=cpe4ih_08
       897.6,           0.,           0.
*End Instance
**
*Instance, name=cpe4ih_16-1, part=cpe4ih_16
       950.4,           0.,           0.
*End Instance
**
*Instance, name=cpe4ih_32-1, part=cpe4ih_32
      1003.2,           0.,           0.
*End Instance
**
*Instance, name=cpe4rh_04-1, part=cpe4rh_04
       1056.,           0.,           0.
*End Instance
**
*Instance, name=cpe4rh_08-1, part=cpe4rh_08
      1108.8,           0.,           0.
*End Instance
**
*Instance, name=cpe4rh_16-1, part=cpe4rh_16
      1161.6,           0.,           0.
*End Instance
**
*Instance, name=cpe4rh_32-1, part=cpe4rh_32
      1214.4,           0.,           0.
*End Instance
**
*Nset, nset=Corner, instance=cpe3h_04-1
 25,
*Nset, nset=Corner, instance=cpe3h_08-1
 81,
*Nset, nset=Corner, instance=cpe3h_32-1
 1089,
*Nset, nset=Corner, instance=cpe6mh_32-1
 1089,
*Nset, nset=Corner, instance=cpe4h_32-1
 1089,
*Nset, nset=Corner, instance=cpe4rh_32-1
 1089,
*Nset, nset=Corner, instance=cpe6h_32-1
 1089,
*Nset, nset=Corner, instance=cpe4ih_32-1
 1089,
*Nset, nset=Corner, instance=cpe6mh_08-1
 81,
*Nset, nset=Corner, instance=cpe6h_08-1
 81,
*Nset, nset=Corner, instance=cpe4ih_08-1
 81,
*Nset, nset=Corner, instance=cpe4h_08-1
 81,
*Nset, nset=Corner, instance=cpe4rh_08-1
 81,
*Nset, nset=Corner, instance=cpe3h_16-1
 289,
*Nset, nset=Corner, instance=cpe6mh_04-1
 25,
*Nset, nset=Corner, instance=cpe6h_04-1
 25,
*Nset, nset=Corner, instance=cpe4ih_04-1
 25,
*Nset, nset=Corner, instance=cpe4h_04-1
 25,
*Nset, nset=Corner, instance=cpe4rh_04-1
 25,
*Nset, nset=Corner, instance=cpe6mh_16-1
 289,
*Nset, nset=Corner, instance=cpe6h_16-1
 289,
*Nset, nset=Corner, instance=cpe4ih_16-1
 289,
*Nset, nset=Corner, instance=cpe4h_16-1
 289,
*Nset, nset=Corner, instance=cpe4rh_16-1
 289,
*Nset, nset=Fix, instance=cpe3h_04-1, generate
  1,  21,   5
*Nset, nset=Fix, instance=cpe3h_08-1, generate
  1,  73,   9
*Nset, nset=Fix, instance=cpe3h_32-1, generate
    1,  1057,    33
*Nset, nset=Fix, instance=cpe6mh_32-1
    1,   34,   67,  100,  133,  166
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*Nset, nset=Fix, instance=cpe4h_32-1, generate
    1,  1057,    33
*Nset, nset=Fix, instance=cpe4rh_32-1, generate
    1,  1057,    33
*Nset, nset=Fix, instance=cpe6h_32-1
    1,   34,   67,  100,  133,  166
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*Nset, nset=Fix, instance=cpe4ih_32-1, generate
    1,  1057,    33
*Nset, nset=Fix, instance=cpe6mh_08-1
   1,  10,  19,  28,  37,  46
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*Nset, nset=Fix, instance=cpe6h_08-1
   1,  10,  19,  28,  37,  46
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*Nset, nset=Fix, instance=cpe4ih_08-1, generate
  1,  73,   9
*Nset, nset=Fix, instance=cpe4h_08-1, generate
  1,  73,   9
*Nset, nset=Fix, instance=cpe4rh_08-1, generate
  1,  73,   9
*Nset, nset=Fix, instance=cpe3h_16-1, generate
   1,  273,   17
*Nset, nset=Fix, instance=cpe6mh_04-1
  1,  6, 11, 16, 21, 28, 44, 57, 70
*Nset, nset=Fix, instance=cpe6h_04-1
  1,  6, 11, 16, 21, 28, 44, 57, 70
*Nset, nset=Fix, instance=cpe4ih_04-1, generate
  1,  21,   5
*Nset, nset=Fix, instance=cpe4h_04-1, generate
  1,  21,   5
*Nset, nset=Fix, instance=cpe4rh_04-1, generate
  1,  21,   5
*Nset, nset=Fix, instance=cpe6mh_16-1
    1,   18,   35,   52,   69,   86
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*Nset, nset=Fix, instance=cpe6h_16-1
    1,   18,   35,   52,   69,   86
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*Nset, nset=Fix, instance=cpe4ih_16-1, generate
   1,  273,   17
*Nset, nset=Fix, instance=cpe4h_16-1, generate
   1,  273,   17
*Nset, nset=Fix, instance=cpe4rh_16-1, generate
   1,  273,   17
*Elset, elset=Fix, instance=cpe3h_04-1, generate
  1,  25,   8
*Elset, elset=Fix, instance=cpe3h_08-1, generate
   1,  113,   16
*Elset, elset=Fix, instance=cpe3h_32-1, generate
    1,  1985,    64
*Elset, elset=Fix, instance=cpe6mh_32-1, generate
    1,  1985,    64
*Elset, elset=Fix, instance=cpe4h_32-1, generate
   1,  993,   32
*Elset, elset=Fix, instance=cpe4rh_32-1, generate
   1,  993,   32
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*Nset, nset=RP, instance=cpe3h_04-1
 26,
*Nset, nset=RP, instance=cpe3h_08-1
 82,
*Nset, nset=RP, instance=cpe3h_32-1
 1090,
*Nset, nset=RP, instance=cpe6mh_32-1
 4226,
*Nset, nset=RP, instance=cpe4h_32-1
 1090,
*Nset, nset=RP, instance=cpe4rh_32-1
 1090,
*Nset, nset=RP, instance=cpe6h_32-1
 4226,
*Nset, nset=RP, instance=cpe4ih_32-1
 1090,
*Nset, nset=RP, instance=cpe6mh_08-1
 290,
*Nset, nset=RP, instance=cpe6h_08-1
 290,
*Nset, nset=RP, instance=cpe4ih_08-1
 82,
*Nset, nset=RP, instance=cpe4h_08-1
 82,
*Nset, nset=RP, instance=cpe4rh_08-1
 82,
*Nset, nset=RP, instance=cpe3h_16-1
 290,
*Nset, nset=RP, instance=cpe6mh_04-1
 82,
*Nset, nset=RP, instance=cpe6h_04-1
 82,
*Nset, nset=RP, instance=cpe4ih_04-1
 26,
*Nset, nset=RP, instance=cpe4h_04-1
 26,
*Nset, nset=RP, instance=cpe4rh_04-1
 26,
*Nset, nset=RP, instance=cpe6mh_16-1
 1090,
*Nset, nset=RP, instance=cpe6h_16-1
 1090,
*Nset, nset=RP, instance=cpe4ih_16-1
 290,
*Nset, nset=RP, instance=cpe4h_16-1
 290,
*Nset, nset=RP, instance=cpe4rh_16-1
 290,
** Constraint: cpe3h_04
*Coupling, constraint name=cpe3h_04, ref node=cpe3h_04-1.RP, surface=cpe3h_04-1.Constraint
*Distributing, weighting method=UNIFORM
** Constraint: cpe3h_08
*Coupling, constraint name=cpe3h_08, ref node=cpe3h_08-1.RP, surface=cpe3h_08-1.Constraint
*Distributing, weighting method=UNIFORM
** Constraint: cpe3h_16
*Coupling, constraint name=cpe3h_16, ref node=cpe3h_16-1.RP, surface=cpe3h_16-1.Constraint
*Distributing, weighting method=UNIFORM
** Constraint: cpe3h_32
*Coupling, constraint name=cpe3h_32, ref node=cpe3h_32-1.RP, surface=cpe3h_32-1.Constraint
*Distributing, weighting method=UNIFORM
** Constraint: cpe4h_04
*Coupling, constraint name=cpe4h_04, ref node=cpe4h_04-1.RP, surface=cpe4h_04-1.Constraint
*Distributing, weighting method=UNIFORM
** Constraint: cpe4h_08
*Coupling, constraint name=cpe4h_08, ref node=cpe4h_08-1.RP, surface=cpe4h_08-1.Constraint
*Distributing, weighting method=UNIFORM
** Constraint: cpe4h_16
*Coupling, constraint name=cpe4h_16, ref node=cpe4h_16-1.RP, surface=cpe4h_16-1.Constraint
*Distributing, weighting method=UNIFORM
** Constraint: cpe4h_32
*Coupling, constraint name=cpe4h_32, ref node=cpe4h_32-1.RP, surface=cpe4h_32-1.Constraint
*Distributing, weighting method=UNIFORM
** Constraint: cpe4ih_04
*Coupling, constraint name=cpe4ih_04, ref node=cpe4ih_04-1.RP, surface=cpe4ih_04-1.Constraint
*Distributing, weighting method=UNIFORM
** Constraint: cpe4ih_08
*Coupling, constraint name=cpe4ih_08, ref node=cpe4ih_08-1.RP, surface=cpe4ih_08-1.Constraint
*Distributing, weighting method=UNIFORM
** Constraint: cpe4ih_16
*Coupling, constraint name=cpe4ih_16, ref node=cpe4ih_16-1.RP, surface=cpe4ih_16-1.Constraint
*Distributing, weighting method=UNIFORM
** Constraint: cpe4ih_32
*Coupling, constraint name=cpe4ih_32, ref node=cpe4ih_32-1.RP, surface=cpe4ih_32-1.Constraint
*Distributing, weighting method=UNIFORM
** Constraint: cpe4rh_04
*Coupling, constraint name=cpe4rh_04, ref node=cpe4rh_04-1.RP, surface=cpe4rh_04-1.Constraint
*Distributing, weighting method=UNIFORM
** Constraint: cpe4rh_08
*Coupling, constraint name=cpe4rh_08, ref node=cpe4rh_08-1.RP, surface=cpe4rh_08-1.Constraint
*Distributing, weighting method=UNIFORM
** Constraint: cpe4rh_16
*Coupling, constraint name=cpe4rh_16, ref node=cpe4rh_16-1.RP, surface=cpe4rh_16-1.Constraint
*Distributing, weighting method=UNIFORM
** Constraint: cpe4rh_32
*Coupling, constraint name=cpe4rh_32, ref node=cpe4rh_32-1.RP, surface=cpe4rh_32-1.Constraint
*Distributing, weighting method=UNIFORM
** Constraint: cpe6h_04
*Coupling, constraint name=cpe6h_04, ref node=cpe6h_04-1.RP, surface=cpe6h_04-1.Constraint
*Distributing, weighting method=UNIFORM
** Constraint: cpe6h_08
*Coupling, constraint name=cpe6h_08, ref node=cpe6h_08-1.RP, surface=cpe6h_08-1.Constraint
*Distributing, weighting method=UNIFORM
** Constraint: cpe6h_16
*Coupling, constraint name=cpe6h_16, ref node=cpe6h_16-1.RP, surface=cpe6h_16-1.Constraint
*Distributing, weighting method=UNIFORM
** Constraint: cpe6h_32
*Coupling, constraint name=cpe6h_32, ref node=cpe6h_32-1.RP, surface=cpe6h_32-1.Constraint
*Distributing, weighting method=UNIFORM
** Constraint: cpe6mh_04
*Coupling, constraint name=cpe6mh_04, ref node=cpe6mh_04-1.RP, surface=cpe6mh_04-1.Constraint
*Distributing, weighting method=UNIFORM
** Constraint: cpe6mh_08
*Coupling, constraint name=cpe6mh_08, ref node=cpe6mh_08-1.RP, surface=cpe6mh_08-1.Constraint
*Distributing, weighting method=UNIFORM
** Constraint: cpe6mh_16
*Coupling, constraint name=cpe6mh_16, ref node=cpe6mh_16-1.RP, surface=cpe6mh_16-1.Constraint
*Distributing, weighting method=UNIFORM
** Constraint: cpe6mh_32
*Coupling, constraint name=cpe6mh_32, ref node=cpe6mh_32-1.RP, surface=cpe6mh_32-1.Constraint
*Distributing, weighting method=UNIFORM
*End Assembly
**
** MATERIALS
**
*Material, name=Material-1
*Hyperelastic, neo hooke
 0.4, 0.00025
** ----------------------------------------------------------------
**
** STEP: Step-1
**
*Step, name=Step-1, nlgeom=YES
*Static
1., 1., 1e-05, 1.
**
** BOUNDARY CONDITIONS
**
** Name: BC-1 Type: Symmetry/Antisymmetry/Encastre
*Boundary
Fix, ENCASTRE
**
** LOADS
**
** Name: Load-1   Type: Concentrated force
*Cload
RP, 2, 1.
**
** OUTPUT REQUESTS
**
*Restart, write, frequency=0
**
** FIELD OUTPUT: F-Output-1
**
*Output, field, frequency=999
*Node Output
UT,
*Element Output, directions=YES
S,
**
** HISTORY OUTPUT: H-Output-1
**
*Output, history
*Node Output, nset=Corner
U1, U2
**
** PRINT TO DAT FILE
**
*Node Print, nset=Corner, freq=999
U1, U2
*End Step
